// COMSOL Multiphysics 5.2.0.166 model "model.mph"
// Outline of the model tree

Geometry
  geom1 "Geometry 1" (3D, length unit m)
    blk1: Block | base = center; size = {1, 1, 1}
    pt1: Point
    fin: Finalize "Form Union"

Physics
  c: CoefficientFormPDE on all domains
    dependent variable u
    ShapeProperty.order = 1
    cfeq1: CoefficientFormPDE (default) | c = 0; a = 1; f = 0; da = 0
    zflx1: ZeroFluxBoundary "Zero Flux 1" (default)
    init1: init "Initial Values 1" (default)
    weak2: WeakContribution on points 5
      integrationOrder = 4
      quadratureFrame = spatial
      weakExpression = test(u)
      automaticQuadrature = 1

Mesh
  mesh1 "Mesh 1" (physics-controlled)
    size: MeshSizeDefault | hauto = 8

Studies
  std1 "Study 1"
    stat: Stationary

Solver configurations
  sol1 "Solution 1" (study std1)
    v1: Variables "Dependent Variables 1"
    s1: Stationary "Stationary Solver 1"
      dDef: Direct
      fc1: FullyCoupled | linsolver = dDef

Datasets
  dset1: Solution | solution = sol1

Plots
  pg1: PlotGroup3D "3D Plot Group 1" | data = dset1
    slc1: Slice | expr = u; genpoints = {{0, 0, 0}, {1, 0, 0}, {0, 1, 0}}
    iso1: Isosurface (disabled) | expr = u

Exports
  tbl1: Table | table = evl3; filename = /Users/giacomo/Desktop/Untitled.txt
  data1: Data
    data = dset1
    expr = u
    unit = 1
    descr = Dependent variable u
    filename = /Users/giacomo/Google Drive/MODEL/tutorials/FEM/time_dependent_ODE/sol.txt